***********************************************  RUN METADATA **********************************************************

Job Start: Thu Mar 20 10:01:05 EDT 2025
Compile End: Thu Mar 20 10:01:16 EDT 2025
Job End: Thu Mar 20 10:01:27 EDT 2025

************************************************ COMPILE NODE INFORMATION **********************************************

****************************************** EXECUTE NODE SYSTEM INFORMATION *********************************************

Execution Start: Thu Mar 20 14:01:22 UTC 2025

  MD5 Data Hash: afe4e16841734ff94e4e5718acce8504  acop2.csv

**********************************************  CONTROL STREAM *********************************************************

;; 2. Description: PK model 1 cmt base
;; x1. Author: Jon Doe
;; Based on: run321.mod
$PROBLEM    PK model 1 cmt base
$INPUT      ID TIME MDV EVID DV AMT SEX WT ETN TRT AGE SMOKING
            DIABETES BMI BSA CLCR
$DATA      acop2.csv IGNORE=@
$SUBROUTINE ADVAN2 TRANS2
$PK
ET=1
IF(ETN.EQ.3) ET=1.3
KA = THETA(1)
CL = THETA(2)*EXP(ETA(1))
V = THETA(3)*EXP(ETA(2))
SC=V

$THETA  (0,2) ; KA
 (0,20) ; CL
 (0,100) ; V2
 0.02 ; RUVp
 1 ; RUVa
$OMEGA  0.05  ;     iiv CL
 0.2  ;     iiv V2
$SIGMA  1  FIX
$ERROR
IPRED = F
IRES = DV-IPRED
W = IPRED*THETA(4) + THETA(5)
IF (W.EQ.0) W = 1
IWRES = IRES/W
Y= IPRED+W*ERR(1)

$ESTIMATION METHOD=1 INTERACTION MAXEVAL=9999 SIG=3 PRINT=5 NOABORT
            POSTHOC MSFO=msf322
$COVARIANCE PRINT=E
;$SIM (1234) NSUBPROBLEMS=1 ONLYSIM
$TABLE      ID TIME DV MDV EVID IPRED IRES IWRES CPRED CWRES CPREDI
            CWRESI ETA1 ETA2 ONEHEADER NOPRINT FILE=sdtab322
$TABLE      ID CL V ONEHEADER NOPRINT FILE=patab322
$TABLE      ID SEX ETN ONEHEADER NOPRINT FILE=catab322
$TABLE      ID WT ONEHEADER NOPRINT FILE=cotab322
$TABLE      ID CL V SEX ETN WT TRT AGE SMOKING DIABETES BMI BSA CLCR
            ONEHEADER NOPRINT FILE=mytab322

*********************************************** NMTRAN MESSAGES ********************************************************

 WARNINGS AND ERRORS (IF ANY) FOR PROBLEM    1
 (WARNING  2) NM-TRAN INFERS THAT THE DATA ARE POPULATION.
*********************************************** NONMEM EXECUTION *******************************************************

1NONLINEAR MIXED EFFECTS MODEL PROGRAM (NONMEM) VERSION 7.4.3
 ORIGINALLY DEVELOPED BY STUART BEAL, LEWIS SHEINER, AND ALISON BOECKMANN
 CURRENT DEVELOPERS ARE ROBERT BAUER, ICON DEVELOPMENT SOLUTIONS,
 AND ALISON BOECKMANN. IMPLEMENTATION, EFFICIENCY, AND STANDARDIZATION
 PERFORMED BY NOUS INFOSYSTEMS.
 PROBLEM NO.:         1
 PK model 1 cmt base
 TOT. NO. OF OBS RECS:      760
 TOT. NO. OF INDIVIDUALS:       40
 ONE COMPARTMENT MODEL WITH FIRST-ORDER ABSORPTION (ADVAN2)
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 #TBLN:      1
 #METH: First Order Conditional Estimation with Interaction
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
 #TERM:
0MINIMIZATION SUCCESSFUL
 NO. OF FUNCTION EVALUATIONS USED:      388
 NO. OF SIG. DIGITS IN FINAL EST.:  3.4

 ETABAR IS THE ARITHMETIC MEAN OF THE ETA-ESTIMATES,
 AND THE P-VALUE IS GIVEN FOR THE NULL HYPOTHESIS THAT THE TRUE MEAN IS 0.

 ETABAR:         2.6417E-03 -6.6794E-03
 SE:             4.6535E-02  5.9899E-02
 N:                      40          40

 P VAL.:         9.5473E-01  9.1121E-01

 ETASHRINKSD(%)  1.5064E+01  2.1373E+00
 ETASHRINKVR(%)  2.7859E+01  4.2289E+00
 EBVSHRINKSD(%)  1.5987E+01  2.5561E+00
 EBVSHRINKVR(%)  2.9417E+01  5.0469E+00
 EPSSHRINKSD(%)  4.1946E+00
 EPSSHRINKVR(%)  8.2132E+00

 TOTAL DATA POINTS NORMALLY DISTRIBUTED (N):          760
 N*LOG(2PI) CONSTANT TO OBJECTIVE FUNCTION:    1396.78657047110
 OBJECTIVE FUNCTION VALUE WITHOUT CONSTANT:    2643.56112865877
 OBJECTIVE FUNCTION VALUE WITH CONSTANT:       4040.34769912988
 REPORTED OBJECTIVE FUNCTION DOES NOT CONTAIN CONSTANT

 TOTAL EFFECTIVE ETAS (NIND*NETA):                            80

 #TERE:
 Elapsed estimation  time in seconds:     2.73
 Elapsed covariance  time in seconds:     0.78
 Elapsed postprocess time in seconds:     0.04

 ********************               FIRST ORDER CONDITIONAL ESTIMATION WITH INTERACTION              ********************
 #OBJT:**************                       MINIMUM VALUE OF OBJECTIVE FUNCTION                      ********************
 #OBJV:********************************************     2643.561       **************************************************

 ********************               FIRST ORDER CONDITIONAL ESTIMATION WITH INTERACTION              ********************
 ********************                             FINAL PARAMETER ESTIMATE                           ********************

 THETA - VECTOR OF FIXED EFFECTS PARAMETERS   *********
         TH 1      TH 2      TH 3      TH 4      TH 5
         2.31E+00  4.25E+01  4.64E+02 -8.09E-02  4.14E+00

 OMEGA - COV MATRIX FOR RANDOM EFFECTS - ETAS  ********
         ETA1      ETA2
 ETA1
+        1.23E-01
 ETA2
+        0.00E+00  1.54E-01

 SIGMA - COV MATRIX FOR RANDOM EFFECTS - EPSILONS  ****
         EPS1
 EPS1
+        1.00E+00

 OMEGA - CORR MATRIX FOR RANDOM EFFECTS - ETAS  *******
         ETA1      ETA2
 ETA1
+        3.51E-01
 ETA2
+        0.00E+00  3.92E-01

 SIGMA - CORR MATRIX FOR RANDOM EFFECTS - EPSILONS  ***
         EPS1
 EPS1
+        1.00E+00

 ********************               FIRST ORDER CONDITIONAL ESTIMATION WITH INTERACTION              ********************
 ********************                            STANDARD ERROR OF ESTIMATE                          ********************

 THETA - VECTOR OF FIXED EFFECTS PARAMETERS   *********
         TH 1      TH 2      TH 3      TH 4      TH 5
         8.52E-02  2.90E+00  2.96E+01  5.55E-02  1.36E+00

 OMEGA - COV MATRIX FOR RANDOM EFFECTS - ETAS  ********
         ETA1      ETA2
 ETA1
+        2.23E-02
 ETA2
+       .........  2.67E-02

 SIGMA - COV MATRIX FOR RANDOM EFFECTS - EPSILONS  ****
         EPS1
 EPS1
+       .........

 OMEGA - CORR MATRIX FOR RANDOM EFFECTS - ETAS  *******
         ETA1      ETA2
 ETA1
+        3.18E-02
 ETA2
+       .........  3.40E-02

 SIGMA - CORR MATRIX FOR RANDOM EFFECTS - EPSILONS  ***
         EPS1
 EPS1
+       .........

 ********************               FIRST ORDER CONDITIONAL ESTIMATION WITH INTERACTION              ********************
 ********************                          COVARIANCE MATRIX OF ESTIMATE                         ********************

            TH 1      TH 2      TH 3      TH 4      TH 5      OM11      OM12      OM22      SG11
 TH 1
+        7.27E-03
 TH 2
+       -1.82E-02  8.42E+00
 TH 3
+       -2.81E-01 -1.80E+01  8.74E+02
 TH 4
+       -2.74E-03  3.89E-02  8.76E-02  3.08E-03
 TH 5
+        6.49E-02 -9.76E-01 -4.07E+00 -7.51E-02  1.85E+00
 OM11
+        1.16E-04 -1.48E-02 -1.52E-01  1.75E-04 -4.52E-03  4.98E-04
 OM12
+       ......... ......... ......... ......... ......... ......... .........
 OM22
+        1.72E-04  2.55E-02 -3.19E-02  3.36E-04 -8.03E-03 -2.09E-07 .........  7.11E-04
 SG11
+       ......... ......... ......... ......... ......... ......... ......... ......... .........

 ********************               FIRST ORDER CONDITIONAL ESTIMATION WITH INTERACTION              ********************
 ********************                          CORRELATION MATRIX OF ESTIMATE                        ********************

            TH 1      TH 2      TH 3      TH 4      TH 5      OM11      OM12      OM22      SG11
 TH 1
+        8.52E-02
 TH 2
+       -7.36E-02  2.90E+00
 TH 3
+       -1.11E-01 -2.10E-01  2.96E+01
 TH 4
+       -5.80E-01  2.42E-01  5.33E-02  5.55E-02
 TH 5
+        5.60E-01 -2.47E-01 -1.01E-01 -9.93E-01  1.36E+00
 OM11
+        6.09E-02 -2.28E-01 -2.30E-01  1.41E-01 -1.49E-01  2.23E-02
 OM12
+       ......... ......... ......... ......... ......... ......... .........
 OM22
+        7.56E-02  3.29E-01 -4.04E-02  2.27E-01 -2.21E-01 -3.50E-04 .........  2.67E-02
 SG11
+       ......... ......... ......... ......... ......... ......... ......... ......... .........
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
 ********************               FIRST ORDER CONDITIONAL ESTIMATION WITH INTERACTION              ********************
 ********************                      EIGENVALUES OF COR MATRIX OF ESTIMATE                     ********************

             1         2         3         4         5         6         7
         4.72E-03  3.76E-01  4.89E-01  8.97E-01  1.25E+00  1.39E+00  2.59E+00
 Elapsed finaloutput time in seconds:     0.48
