***********************************************  RUN METADATA **********************************************************

Job Start: Thu Mar 20 10:01:01 EDT 2025
Compile End: Thu Mar 20 10:01:11 EDT 2025
Job End: Thu Mar 20 10:01:25 EDT 2025

************************************************ COMPILE NODE INFORMATION **********************************************

****************************************** EXECUTE NODE SYSTEM INFORMATION *********************************************

Execution Start: Thu Mar 20 14:01:17 UTC 2025

  MD5 Data Hash: afe4e16841734ff94e4e5718acce8504  acop2.csv

**********************************************  CONTROL STREAM *********************************************************

;; 2. Description: PK model 1 cmt base
;; x1. Author: Will Hane
;; Based on: run322.mod
$PROBLEM    PK model 1 cmt base with weight effect
$INPUT      ID TIME MDV EVID DV AMT SEX WT ETN TRT AGE SMOKING
            DIABETES BMI BSA CLCR
$DATA      acop2.csv IGNORE=@
$SUBROUTINE ADVAN2 TRANS2
$PK
ET=1
IF(ETN.EQ.3) ET=1.3
KA = THETA(1) + THETA(8)*SEX
CL = THETA(2)*(WT/70)**THETA(6)*EXP(ETA(1))
V = THETA(3)*(WT/70)**THETA(7)*EXP(ETA(2))
SC=V

$THETA  (0,2) ; THETA1: Absorption rate constant
 (0,20) ; THETA2: Clearance
 (0,100) ; THETA3: Central Volume
 0.02 ; RUVp
 1 ; RUVa
 0.75 ; THETA6: Body weight effect on CL
 1.0 ; THETA7: Body weight effect on V
 0.1 ; THETA8: Sex effect on KA
$OMEGA  0.05  ; Random variability for CL
 0.2  ; Random variability for V
$SIGMA  1  FIX
$ERROR
IPRED = F
IRES = DV-IPRED
W = IPRED*THETA(4) + THETA(5)
IF (W.EQ.0) W = 1
IWRES = IRES/W ; Weighted residual error
Y= IPRED+W*ERR(1)

$ESTIMATION METHOD=1 INTERACTION MAXEVAL=99999 NSIG=3 PRINT=5 NOABORT
            POSTHOC MSFO=msf326
$COVARIANCE PRINT=E
;$SIM (1234) NSUBPROBLEMS=1 ONLYSIM
$TABLE      ID TIME DV MDV EVID IPRED IRES IWRES CPRED CWRES CPREDI
            CWRESI ETA1 ETA2 ONEHEADER NOPRINT FILE=sdtab326
$TABLE      ID CL V ONEHEADER NOPRINT FILE=patab326
$TABLE      ID SEX ETN ONEHEADER NOPRINT FILE=catab326
$TABLE      ID WT ONEHEADER NOPRINT FILE=cotab326
$TABLE      ID CL V SEX ETN WT TRT AGE SMOKING DIABETES BMI BSA CLCR
            ONEHEADER NOPRINT FILE=mytab326

*********************************************** NMTRAN MESSAGES ********************************************************

 WARNINGS AND ERRORS (IF ANY) FOR PROBLEM    1
 (WARNING  2) NM-TRAN INFERS THAT THE DATA ARE POPULATION.
*********************************************** NONMEM EXECUTION *******************************************************

1NONLINEAR MIXED EFFECTS MODEL PROGRAM (NONMEM) VERSION 7.4.3
 ORIGINALLY DEVELOPED BY STUART BEAL, LEWIS SHEINER, AND ALISON BOECKMANN
 CURRENT DEVELOPERS ARE ROBERT BAUER, ICON DEVELOPMENT SOLUTIONS,
 AND ALISON BOECKMANN. IMPLEMENTATION, EFFICIENCY, AND STANDARDIZATION
 PERFORMED BY NOUS INFOSYSTEMS.
 PROBLEM NO.:         1
 PK model 1 cmt base with weight effect
 TOT. NO. OF OBS RECS:      760
 TOT. NO. OF INDIVIDUALS:       40
 ONE COMPARTMENT MODEL WITH FIRST-ORDER ABSORPTION (ADVAN2)
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 #TBLN:      1
 #METH: First Order Conditional Estimation with Interaction
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
 #TERM:
0MINIMIZATION SUCCESSFUL
 NO. OF FUNCTION EVALUATIONS USED:      727
 NO. OF SIG. DIGITS IN FINAL EST.:  3.7

 ETABAR IS THE ARITHMETIC MEAN OF THE ETA-ESTIMATES,
 AND THE P-VALUE IS GIVEN FOR THE NULL HYPOTHESIS THAT THE TRUE MEAN IS 0.

 ETABAR:         1.1335E-03 -6.0717E-03
 SE:             3.5697E-02  5.9400E-02
 N:                      40          40

 P VAL.:         9.7467E-01  9.1858E-01

 ETASHRINKSD(%)  1.9528E+01  2.0461E+00
 ETASHRINKVR(%)  3.5243E+01  4.0504E+00
 EBVSHRINKSD(%)  2.0563E+01  2.5452E+00
 EBVSHRINKVR(%)  3.6897E+01  5.0256E+00
 EPSSHRINKSD(%)  4.0050E+00
 EPSSHRINKVR(%)  7.8497E+00

 TOTAL DATA POINTS NORMALLY DISTRIBUTED (N):          760
 N*LOG(2PI) CONSTANT TO OBJECTIVE FUNCTION:    1396.78657047110
 OBJECTIVE FUNCTION VALUE WITHOUT CONSTANT:    2631.83365722844
 OBJECTIVE FUNCTION VALUE WITH CONSTANT:       4028.62022769954
 REPORTED OBJECTIVE FUNCTION DOES NOT CONTAIN CONSTANT

 TOTAL EFFECTIVE ETAS (NIND*NETA):                            80

 #TERE:
 Elapsed estimation  time in seconds:     4.70
 Elapsed covariance  time in seconds:     1.70
 Elapsed postprocess time in seconds:     0.05

 ********************               FIRST ORDER CONDITIONAL ESTIMATION WITH INTERACTION              ********************
 #OBJT:**************                       MINIMUM VALUE OF OBJECTIVE FUNCTION                      ********************
 #OBJV:********************************************     2631.834       **************************************************

 ********************               FIRST ORDER CONDITIONAL ESTIMATION WITH INTERACTION              ********************
 ********************                             FINAL PARAMETER ESTIMATE                           ********************

 THETA - VECTOR OF FIXED EFFECTS PARAMETERS   *********
         TH 1      TH 2      TH 3      TH 4      TH 5      TH 6      TH 7      TH 8
         2.55E+00  5.74E+01  4.59E+02 -8.16E-02  4.15E+00  8.79E-01 -3.87E-02 -4.05E-01

 OMEGA - COV MATRIX FOR RANDOM EFFECTS - ETAS  ********
         ETA1      ETA2
 ETA1
+        8.07E-02
 ETA2
+        0.00E+00  1.51E-01

 SIGMA - COV MATRIX FOR RANDOM EFFECTS - EPSILONS  ****
         EPS1
 EPS1
+        1.00E+00

 OMEGA - CORR MATRIX FOR RANDOM EFFECTS - ETAS  *******
         ETA1      ETA2
 ETA1
+        2.84E-01
 ETA2
+        0.00E+00  3.88E-01

 SIGMA - CORR MATRIX FOR RANDOM EFFECTS - EPSILONS  ***
         EPS1
 EPS1
+        1.00E+00

 ********************               FIRST ORDER CONDITIONAL ESTIMATION WITH INTERACTION              ********************
 ********************                            STANDARD ERROR OF ESTIMATE                          ********************

 THETA - VECTOR OF FIXED EFFECTS PARAMETERS   *********
         TH 1      TH 2      TH 3      TH 4      TH 5      TH 6      TH 7      TH 8
         1.52E-01  6.82E+00  5.80E+01  5.61E-02  1.37E+00  2.89E-01  3.26E-01  1.77E-01

 OMEGA - COV MATRIX FOR RANDOM EFFECTS - ETAS  ********
         ETA1      ETA2
 ETA1
+        2.00E-02
 ETA2
+       .........  2.62E-02

 SIGMA - COV MATRIX FOR RANDOM EFFECTS - EPSILONS  ****
         EPS1
 EPS1
+       .........

 OMEGA - CORR MATRIX FOR RANDOM EFFECTS - ETAS  *******
         ETA1      ETA2
 ETA1
+        3.53E-02
 ETA2
+       .........  3.38E-02

 SIGMA - CORR MATRIX FOR RANDOM EFFECTS - EPSILONS  ***
         EPS1
 EPS1
+       .........

 ********************               FIRST ORDER CONDITIONAL ESTIMATION WITH INTERACTION              ********************
 ********************                          COVARIANCE MATRIX OF ESTIMATE                         ********************

            TH 1      TH 2      TH 3      TH 4      TH 5      TH 6      TH 7      TH 8      OM11      OM12      OM22      SG11
 TH 1
+        2.30E-02
 TH 2
+       -3.35E-01  4.65E+01
 TH 3
+        1.06E+00 -1.35E+02  3.37E+03
 TH 4
+       -6.51E-03  4.62E-02 -2.56E-01  3.15E-03
 TH 5
+        1.60E-01 -1.48E+00  1.50E+00 -7.63E-02  1.88E+00
 TH 6
+       -1.21E-02  1.70E+00 -4.85E+00  9.14E-04 -3.34E-02  8.36E-02
 TH 7
+        1.26E-02 -7.01E-01  1.63E+01 -2.50E-03  4.19E-02 -3.03E-02  1.06E-01
 TH 8
+       -2.46E-02  4.06E-01  1.25E-01  7.18E-03 -1.78E-01  1.70E-02 -6.43E-03  3.13E-02
 OM11
+       -7.99E-04 -4.74E-02  1.08E-01  4.77E-04 -1.14E-02 -1.87E-03  9.91E-04  7.84E-04  4.01E-04
 OM12
+       ......... ......... ......... ......... ......... ......... ......... ......... ......... .........
 OM22
+       -5.18E-05  1.43E-03  1.02E-01  3.86E-04 -9.24E-03 -1.60E-03  6.44E-04 -1.93E-04  1.07E-04 .........  6.88E-04
 SG11
+       ......... ......... ......... ......... ......... ......... ......... ......... ......... ......... ......... .........

 ********************               FIRST ORDER CONDITIONAL ESTIMATION WITH INTERACTION              ********************
 ********************                          CORRELATION MATRIX OF ESTIMATE                        ********************

            TH 1      TH 2      TH 3      TH 4      TH 5      TH 6      TH 7      TH 8      OM11      OM12      OM22      SG11
 TH 1
+        1.52E-01
 TH 2
+       -3.24E-01  6.82E+00
 TH 3
+        1.21E-01 -3.41E-01  5.80E+01
 TH 4
+       -7.64E-01  1.21E-01 -7.87E-02  5.61E-02
 TH 5
+        7.72E-01 -1.59E-01  1.89E-02 -9.93E-01  1.37E+00
 TH 6
+       -2.75E-01  8.62E-01 -2.89E-01  5.63E-02 -8.44E-02  2.89E-01
 TH 7
+        2.54E-01 -3.16E-01  8.64E-01 -1.37E-01  9.40E-02 -3.22E-01  3.26E-01
 TH 8
+       -9.17E-01  3.36E-01  1.22E-02  7.23E-01 -7.36E-01  3.33E-01 -1.12E-01  1.77E-01
 OM11
+       -2.63E-01 -3.47E-01  9.27E-02  4.24E-01 -4.16E-01 -3.22E-01  1.52E-01  2.21E-01  2.00E-02
 OM12
+       ......... ......... ......... ......... ......... ......... ......... ......... ......... .........
 OM22
+       -1.30E-02  7.99E-03  6.72E-02  2.62E-01 -2.57E-01 -2.11E-01  7.54E-02 -4.15E-02  2.04E-01 .........  2.62E-02
 SG11
+       ......... ......... ......... ......... ......... ......... ......... ......... ......... ......... ......... .........
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
 ********************               FIRST ORDER CONDITIONAL ESTIMATION WITH INTERACTION              ********************
 ********************                      EIGENVALUES OF COR MATRIX OF ESTIMATE                     ********************

             1         2         3         4         5         6         7         8         9        10
         2.09E-03  5.46E-02  8.55E-02  1.46E-01  3.11E-01  5.50E-01  9.97E-01  1.39E+00  2.61E+00  3.85E+00
 Elapsed finaloutput time in seconds:     0.60
