;; 2. Description: PK model 1 cmt base
;; x1. Author: Jon Doe
;; Based on: run321.mod

$PROBLEM PK model 1 cmt base

$INPUT ID TSFD MDV EVID DV AMT  SEX WT ETN TRT AGE SMOKING DIABETES BMI BSA CLCR
$DATA acop.csv IGNORE=@
$SUBROUTINES ADVAN2 TRANS2

$PK
ET=1
IF(ETN.EQ.3) ET=1.3
KA = THETA(1)
CL = THETA(2)*EXP(ETA(1))
V = THETA(3)*EXP(ETA(2))
SC=V

$THETA
(0, 2)  ; KA
(0, 20)  ; CL
(0, 100) ; V2
(0.02)  ; RUVp
(1)     ; RUVa


$OMEGA
0.05    ; iiv CL
0.2     ; iiv V2

$SIGMA
1 FIX

$ERROR
IPRED = F
IRES = DV-IPRED
W = IPRED*THETA(4) + THETA(5)
IF (W.EQ.0) W = 1
IWRES = IRES/W
Y= IPRED+W*ERR(1)

$EST METHOD=1 INTERACTION MAXEVAL=9999 SIG=3 PRINT=5 NOABORT POSTHOC MSFO=msf501
$COV PRINT=E
;$SIM (1234) NSUBPROBLEMS=1 ONLYSIM

$TABLE ID TIME DV MDV EVID IPRED IWRES CWRES ONEHEADER NOPRINT FILE=sdtab501
$TABLE ID CL V ONEHEADER NOPRINT FILE=patab501
$TABLE ID SEX ETN ONEHEADER NOPRINT FILE=catab501
$TABLE ID WT ONEHEADER NOPRINT FILE=cotab501
$TABLE ID CL V SEX ETN WT ONEHEADER NOPRINT FILE=mytab501
